*Heading
** Job name: T_Cu_01 Model name: T_Cu_01
** Generated by: Abaqus/CAE 2017
*Preprint, echo=NO, model=NO, history=NO, contact=NO
**
** PARTS
**
*Part, name=Part-1
*Node
      1,           0.,           0.
      2,           1.,           0.
      3,           0.,           1.
      4,           1.,           1.
*Element, type=CPS4R
1, 1, 2, 4, 3
*Nset, nset=Set-1, generate
 1,  4,  1
*Elset, elset=Set-1
 1,
*Orientation, name=Local
1., 0., 0., 0., 1., 0.
3, 0.
*Orientation, name=Global
1., 0., 0., 0., 1., 0.
3, 0.
** Section: Section-1
*Solid Section, elset=Set-1, orientation=Local, material=Cu
1.,
*Hourglass Stiffness
203.125
*End Part
**
**
** ASSEMBLY
**
*Assembly, name=Assembly
**
*Instance, name=Part-1-1, part=Part-1
*End Instance
**
*Nset, nset=Set-1, instance=Part-1-1
 1, 3
*Elset, elset=Set-1, instance=Part-1-1
 1,
*Nset, nset=Set-2, instance=Part-1-1
 1, 2
*Elset, elset=Set-2, instance=Part-1-1
 1,
*Nset, nset=Set-3, instance=Part-1-1
 2, 4
*Elset, elset=Set-3, instance=Part-1-1
 1,
*End Assembly
**
** MATERIALS
**
*Material, name=Cu
*User material, constants=29
 0,0,104000.0,0.28,-2,1.0,1.0,1.0,
 1.0,1.0,1.0,1.0,1.0,8.0,5,180.0,
 5.06,2.11,52.2,5,3,824.9,56.5,135.4,
 0.0684,27509.4,415.55,5,0.5
*Depvar
 13
*User output variables
 10
**
** BOUNDARY CONDITIONS
**
** Name: BC-1 Type: Displacement/Rotation
*Boundary
Set-1, 1, 1
** Name: BC-2 Type: Displacement/Rotation
*Boundary
Set-2, 2, 2
** ----------------------------------------------------------------
**
** STEP: Step-1
**
*Step, name=Step-1, nlgeom=YES, inc=100000
*Static
0.001, 1., 0.0001, 0.01
**
** BOUNDARY CONDITIONS
**
** Name: BC-3 Type: Displacement/Rotation
*Boundary
Set-3, 1, 1, 1.0
**
** OUTPUT REQUESTS
**
*Restart, write, frequency=0
**
** FIELD OUTPUT: F-Output-1
**
*Output, field
*Node Output
 U,RF
*Element Output, directions=YES
 S,LE,SDV,UVARM
**
*End Step
